Thu Jan  8 15:09:00 UTC 2026
$PROBLEM Base one-compartment oral absorption model created from pharos see run003_metadata.json for details.

$INPUT ID TIME EVID AMT CMT DV MDV WT SEX

$DATA /data/user-homes/matthews/Packages/hyperion/vignettes/test_data/data/derived/onecmpt-oral-30ind.csv IGNORE=@

$SUBROUTINES ADVAN2 TRANS2

$PK
; Typical values
TVCL = THETA(1)
TVV  = THETA(2)
TVKA = THETA(3)

; Individual parameters
CL = TVCL * EXP(ETA(1))
V  = TVV  * EXP(ETA(2))
KA = TVKA * EXP(ETA(3))

; NONMEM scaling
S2 = V

$ERROR
; Proportional + additive error model (matches mrgsolve)
IPRED = F
Y = IPRED * (1 + EPS(1)) + EPS(2)

$THETA
(0, 1.6115)     ;TVCL (L/hr)
(0, 36.181)    ;TVV (L)
(0, 1.0038)     ;TVKA (1/hr)

$OMEGA BLOCK(2)
0.1       ;OM1 TVCL :EXP
0.0001    ;OM1,2 TVCL,TVV :EXP
0.1       ;OM2 TVV :EXP
$OMEGA
0.1       ;OM3 TVKA :EXP

$SIGMA
0.035738    ;SIG1 Proportional error (variance, 20% CV)
0.006      ;SIG2 Additive error (variance, 0.01 mg/L SD)

$ESTIMATION METHOD=1 INTERACTION MAXEVAL=9999 PRINT=5 MSFO=run003.msf
$COV PRINT=E MATRIX = R

$TABLE ID TIME DV PRED IPRED CWRES NPDE NOAPPEND NOPRINT ONEHEADER FILE=run003.tab
$TABLE ID CL V KA ETAS(1:LAST) NOAPPEND NOPRINT ONEHEADER FIRSTONLY FILE=run003par.tab

NM-TRAN MESSAGES
 WARNINGS AND ERRORS (IF ANY) FOR PROBLEM    1
 (WARNING  2) NM-TRAN INFERS THAT THE DATA ARE POPULATION.
 LIM VALUES MAXLIM ASSESSED BY NMTRAN: 1,2,3,4,5,6,7,8,10,11,13,15,16
Note: Analytical 2nd Derivatives are constructed in FSUBS but are never used.
      You may insert $ABBR DERIV2=NO after the first $PROB to save FSUBS construction and compilation time

1NONLINEAR MIXED EFFECTS MODEL PROGRAM (NONMEM) VERSION 7.6.0 (nm760)
 ORIGINALLY DEVELOPED BY STUART BEAL, LEWIS SHEINER, AND ALISON BOECKMANN
 CURRENT DEVELOPERS ARE ROBERT BAUER, ICON DEVELOPMENT SOLUTIONS,
 AND ALISON BOECKMANN. IMPLEMENTATION, EFFICIENCY, AND STANDARDIZATION
 PERFORMED BY NOUS INFOSYSTEMS.
 PROBLEM NO.:         1
 Base one-compartment oral absorption model created from pharos see run00
 TOT. NO. OF OBS RECS:      210
 TOT. NO. OF INDIVIDUALS:       30
 ONE COMPARTMENT MODEL WITH FIRST-ORDER ABSORPTION (ADVAN2)
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 #TBLN:      1
 #METH: First Order Conditional Estimation with Interaction
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
 #TERM:
0MINIMIZATION SUCCESSFUL
 NO. OF FUNCTION EVALUATIONS USED:      379
 NO. OF SIG. DIGITS IN FINAL EST.:  3.3

 ETABAR IS THE ARITHMETIC MEAN OF THE ETA-ESTIMATES,
 AND THE P-VALUE IS GIVEN FOR THE NULL HYPOTHESIS THAT THE TRUE MEAN IS 0.

 ETABAR:         1.5458E-02 -1.0450E-02 -1.8245E-02
 SE:             5.5394E-02  6.1254E-02  4.8217E-02
 N:                      30          30          30

 P VAL.:         7.8020E-01  8.6453E-01  7.0513E-01

 ETASHRINKSD(%)  1.3144E+01  4.6313E+00  2.4338E+01
 ETASHRINKVR(%)  2.4560E+01  9.0481E+00  4.2752E+01
 EBVSHRINKSD(%)  1.3747E+01  4.7133E+00  2.3600E+01
 EBVSHRINKVR(%)  2.5605E+01  9.2045E+00  4.1630E+01
 RELATIVEINF(%)  4.8312E+01  6.8365E+01  5.1986E+01
 EPSSHRINKSD(%)  1.4422E+01  1.4422E+01
 EPSSHRINKVR(%)  2.6764E+01  2.6764E+01


 TOTAL DATA POINTS NORMALLY DISTRIBUTED (N):          210
 N*LOG(2PI) CONSTANT TO OBJECTIVE FUNCTION:    385.95418394596254
 OBJECTIVE FUNCTION VALUE WITHOUT CONSTANT:   -109.82582410548454
 OBJECTIVE FUNCTION VALUE WITH CONSTANT:       276.12835984047797
 REPORTED OBJECTIVE FUNCTION DOES NOT CONTAIN CONSTANT

 TOTAL EFFECTIVE ETAS (NIND*NETA):                            90


 #TERE:
 Elapsed estimation  time in seconds:     0.51
 Elapsed covariance  time in seconds:     0.25
 Elapsed postprocess time in seconds:     0.04

 ********************               FIRST ORDER CONDITIONAL ESTIMATION WITH INTERACTION              ********************
 #OBJT:**************                       MINIMUM VALUE OF OBJECTIVE FUNCTION                      ********************
 #OBJV:********************************************          -109.826       *********************************************

 ********************               FIRST ORDER CONDITIONAL ESTIMATION WITH INTERACTION              ********************
 ********************                             FINAL PARAMETER ESTIMATE                           ********************

 THETA - VECTOR OF FIXED EFFECTS PARAMETERS   *********
         TH 1      TH 2      TH 3
         1.33E+00  4.02E+01  1.21E+00

 OMEGA - COV MATRIX FOR RANDOM EFFECTS - ETAS  ********
         ETA1      ETA2      ETA3
 ETA1
+        1.22E-01
 ETA2
+        7.45E-02  1.24E-01
 ETA3
+        0.00E+00  0.00E+00  1.22E-01

 SIGMA - COV MATRIX FOR RANDOM EFFECTS - EPSILONS  ****
         EPS1      EPS2
 EPS1
+        3.75E-02
 EPS2
+        0.00E+00  5.27E-03

 OMEGA - CORR MATRIX FOR RANDOM EFFECTS - ETAS  *******
         ETA1      ETA2      ETA3
 ETA1
+        3.50E-01
 ETA2
+        6.06E-01  3.52E-01
 ETA3
+        0.00E+00  0.00E+00  3.50E-01

 SIGMA - CORR MATRIX FOR RANDOM EFFECTS - EPSILONS  ***
         EPS1      EPS2
 EPS1
+        1.94E-01
 EPS2
+        0.00E+00  7.26E-02

 ********************               FIRST ORDER CONDITIONAL ESTIMATION WITH INTERACTION              ********************
 ********************                            STANDARD ERROR OF ESTIMATE                          ********************

 THETA - VECTOR OF FIXED EFFECTS PARAMETERS   *********
         TH 1      TH 2      TH 3
         1.11E-01  2.84E+00  1.10E-01

 OMEGA - COV MATRIX FOR RANDOM EFFECTS - ETAS  ********
         ETA1      ETA2      ETA3
 ETA1
+        5.04E-02
 ETA2
+        3.13E-02  3.67E-02
 ETA3
+       ......... .........  5.63E-02

 SIGMA - COV MATRIX FOR RANDOM EFFECTS - EPSILONS  ****
         EPS1      EPS2
 EPS1
+        6.03E-03
 EPS2
+       .........  9.21E-03

 OMEGA - CORR MATRIX FOR RANDOM EFFECTS - ETAS  *******
         ETA1      ETA2      ETA3
 ETA1
+        7.20E-02
 ETA2
+        1.94E-01  5.22E-02
 ETA3
+       ......... .........  8.04E-02

 SIGMA - CORR MATRIX FOR RANDOM EFFECTS - EPSILONS  ***
         EPS1      EPS2
 EPS1
+        1.56E-02
 EPS2
+       .........  6.34E-02

 ********************               FIRST ORDER CONDITIONAL ESTIMATION WITH INTERACTION              ********************
 ********************                          COVARIANCE MATRIX OF ESTIMATE                         ********************

            TH 1      TH 2      TH 3      OM11      OM12      OM13      OM22      OM23      OM33      SG11      SG12      SG22
 TH 1
+        1.24E-02
 TH 2
+        7.97E-02  8.06E+00
 TH 3
+       -2.74E-03  7.14E-02  1.20E-02
 OM11
+       -1.58E-04  3.01E-03  1.71E-04  2.54E-03
 OM12
+        4.21E-04 -3.41E-03 -1.57E-04  7.66E-04  9.82E-04
 OM13
+       ......... ......... ......... ......... ......... .........
 OM22
+       -1.91E-04  1.41E-03  9.10E-05  1.39E-04  5.47E-04 .........  1.35E-03
 OM23
+       ......... ......... ......... ......... ......... ......... ......... .........
 OM33
+        3.85E-05  1.41E-03  4.62E-04 -5.01E-04  9.99E-05 .........  2.20E-04 .........  3.17E-03
 SG11
+        5.28E-05  8.34E-04  1.04E-05  1.00E-05  4.68E-07 ......... -2.36E-05 ......... -4.44E-05  3.64E-05
 SG12
+       ......... ......... ......... ......... ......... ......... ......... ......... ......... ......... .........
 SG22
+       -7.06E-05  3.68E-04 -2.18E-05 -7.01E-05  2.79E-06 .........  2.64E-05 .........  2.74E-05 -3.16E-05 .........  8.48E-05

 ********************               FIRST ORDER CONDITIONAL ESTIMATION WITH INTERACTION              ********************
 ********************                          CORRELATION MATRIX OF ESTIMATE                        ********************

            TH 1      TH 2      TH 3      OM11      OM12      OM13      OM22      OM23      OM33      SG11      SG12      SG22
 TH 1
+        1.11E-01
 TH 2
+        2.52E-01  2.84E+00
 TH 3
+       -2.24E-01  2.29E-01  1.10E-01
 OM11
+       -2.82E-02  2.10E-02  3.09E-02  5.04E-02
 OM12
+        1.21E-01 -3.83E-02 -4.56E-02  4.85E-01  3.13E-02
 OM13
+       ......... ......... ......... ......... ......... .........
 OM22
+       -4.67E-02  1.35E-02  2.26E-02  7.52E-02  4.75E-01 .........  3.67E-02
 OM23
+       ......... ......... ......... ......... ......... ......... ......... .........
 OM33
+        6.13E-03  8.80E-03  7.47E-02 -1.77E-01  5.66E-02 .........  1.06E-01 .........  5.63E-02
 SG11
+        7.84E-02  4.87E-02  1.57E-02  3.30E-02  2.48E-03 ......... -1.07E-01 ......... -1.31E-01  6.03E-03
 SG12
+       ......... ......... ......... ......... ......... ......... ......... ......... ......... ......... .........
 SG22
+       -6.88E-02  1.41E-02 -2.15E-02 -1.51E-01  9.67E-03 .........  7.81E-02 .........  5.28E-02 -5.68E-01 .........  9.21E-03
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
 ********************               FIRST ORDER CONDITIONAL ESTIMATION WITH INTERACTION              ********************
 ********************                      EIGENVALUES OF COR MATRIX OF ESTIMATE                     ********************

             1         2         3         4         5         6         7         8         9
         2.79E-01  4.48E-01  5.33E-01  7.74E-01  1.07E+00  1.23E+00  1.26E+00  1.69E+00  1.72E+00
 Elapsed finaloutput time in seconds:     0.01
 #CPUT: Total CPU Time in Seconds,        0.805
