Tue Jan 13 19:53:01 UTC 2026
$PROBLEM Base one-compartment oral absorption model created from pharos see run003b1_metadata.json for details.

$INPUT ID TIME EVID AMT CMT DV MDV WT SEX

$DATA /data/user-homes/matthews/Packages/hyperion/vignettes/test_data/data/derived/onecmpt-oral-30ind-cov.csv IGNORE=@

$SUBROUTINES ADVAN2 TRANS2

$PK
; Typical values
TVCL = THETA(1)
WTonCL = THETA(2)
TVV  = THETA(3)
TVKA = THETA(4)

; Individual parameters
CL = TVCL * EXP(ETA(1)) * (WT / 70) ** WTonCL
V  = TVV  * EXP(ETA(2))
KA = TVKA * EXP(ETA(3))

; NONMEM scaling
S2 = V

$ERROR
; Proportional + additive error model (matches mrgsolve)
IPRED = F
Y = IPRED * (1 + EPS(1)) + EPS(2)

$THETA
(0, 1.768615)     ;TVCL (L/hr)
(0.5, 5)           ;WT-on-CL ()
(0, 34.80303)    ;TVV (L)
(0, 0.939213)     ;TVKA (1/hr)

$OMEGA BLOCK(2)
0.103       ;OM1 TVCL :EXP
0.00009    ;OM1,2 TVCL,TVV :EXP
0.109       ;OM2 TVV :EXP
$OMEGA
0.099       ;OM3 TVKA :EXP

$SIGMA
0.03464956    ;SIG1 Proportional error (variance, 20% CV)
0.00602      ;SIG2 Additive error (variance, 0.01 mg/L SD)

$ESTIMATION METHOD=1 INTERACTION MAXEVAL=9999 PRINT=5 MSFO=run003b1.msf
$COV PRINT=E MATRIX = R

$TABLE ID TIME DV PRED IPRED CWRES NPDE NOAPPEND NOPRINT ONEHEADER FILE=run003b1.tab
$TABLE ID CL V KA ETAS(1:LAST) NOAPPEND NOPRINT ONEHEADER FIRSTONLY FILE=run003b1par.tab

NM-TRAN MESSAGES
 WARNINGS AND ERRORS (IF ANY) FOR PROBLEM    1
 (WARNING  2) NM-TRAN INFERS THAT THE DATA ARE POPULATION.
 LIM VALUES MAXLIM ASSESSED BY NMTRAN: 1,2,3,4,5,6,7,8,10,11,13,15,16
Note: Analytical 2nd Derivatives are constructed in FSUBS but are never used.
      You may insert $ABBR DERIV2=NO after the first $PROB to save FSUBS construction and compilation time

1NONLINEAR MIXED EFFECTS MODEL PROGRAM (NONMEM) VERSION 7.6.0 (nm760)
 ORIGINALLY DEVELOPED BY STUART BEAL, LEWIS SHEINER, AND ALISON BOECKMANN
 CURRENT DEVELOPERS ARE ROBERT BAUER, ICON DEVELOPMENT SOLUTIONS,
 AND ALISON BOECKMANN. IMPLEMENTATION, EFFICIENCY, AND STANDARDIZATION
 PERFORMED BY NOUS INFOSYSTEMS.
 PROBLEM NO.:         1
 Base one-compartment oral absorption model created from pharos see run00
 TOT. NO. OF OBS RECS:      210
 TOT. NO. OF INDIVIDUALS:       30
 ONE COMPARTMENT MODEL WITH FIRST-ORDER ABSORPTION (ADVAN2)
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 #TBLN:      1
 #METH: First Order Conditional Estimation with Interaction
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
 #TERM:
0MINIMIZATION SUCCESSFUL
 NO. OF FUNCTION EVALUATIONS USED:      297
 NO. OF SIG. DIGITS IN FINAL EST.:  3.2
0PARAMETER ESTIMATE IS NEAR ITS BOUNDARY
 THIS MUST BE ADDRESSED BEFORE THE COVARIANCE STEP CAN BE IMPLEMENTED

 ETABAR IS THE ARITHMETIC MEAN OF THE ETA-ESTIMATES,
 AND THE P-VALUE IS GIVEN FOR THE NULL HYPOTHESIS THAT THE TRUE MEAN IS 0.

 ETABAR:         1.6297E-02 -1.0824E-02 -1.8644E-02
 SE:             5.5262E-02  6.1435E-02  4.8484E-02
 N:                      30          30          30

 P VAL.:         7.6806E-01  8.6014E-01  7.0058E-01

 ETASHRINKSD(%)  1.3664E+01  4.6251E+00  2.4365E+01
 ETASHRINKVR(%)  2.5461E+01  9.0362E+00  4.2793E+01
 EBVSHRINKSD(%)  1.4333E+01  4.7358E+00  2.3653E+01
 EBVSHRINKVR(%)  2.6611E+01  9.2474E+00  4.1712E+01
 RELATIVEINF(%)  4.8861E+01  6.9581E+01  5.2094E+01
 EPSSHRINKSD(%)  1.4506E+01  1.4506E+01
 EPSSHRINKVR(%)  2.6908E+01  2.6908E+01


 TOTAL DATA POINTS NORMALLY DISTRIBUTED (N):          210
 N*LOG(2PI) CONSTANT TO OBJECTIVE FUNCTION:    385.95418394596254
 OBJECTIVE FUNCTION VALUE WITHOUT CONSTANT:   -108.88878754052826
 OBJECTIVE FUNCTION VALUE WITH CONSTANT:       277.06539640543429
 REPORTED OBJECTIVE FUNCTION DOES NOT CONTAIN CONSTANT

 TOTAL EFFECTIVE ETAS (NIND*NETA):                            90


 #TERE:
 Elapsed estimation  time in seconds:     0.39
 Elapsed postprocess time in seconds:     0.04

 ********************               FIRST ORDER CONDITIONAL ESTIMATION WITH INTERACTION              ********************
 #OBJT:**************                       MINIMUM VALUE OF OBJECTIVE FUNCTION                      ********************
 #OBJV:********************************************          -108.889       *********************************************

 ********************               FIRST ORDER CONDITIONAL ESTIMATION WITH INTERACTION              ********************
 ********************                             FINAL PARAMETER ESTIMATE                           ********************

 THETA - VECTOR OF FIXED EFFECTS PARAMETERS   *********
         TH 1      TH 2      TH 3      TH 4
         1.25E+00  5.45E-01  4.03E+01  1.22E+00

 OMEGA - COV MATRIX FOR RANDOM EFFECTS - ETAS  ********
         ETA1      ETA2      ETA3
 ETA1
+        1.23E-01
 ETA2
+        7.22E-02  1.25E-01
 ETA3
+        0.00E+00  0.00E+00  1.24E-01

 SIGMA - COV MATRIX FOR RANDOM EFFECTS - EPSILONS  ****
         EPS1      EPS2
 EPS1
+        3.74E-02
 EPS2
+        0.00E+00  5.89E-03

 OMEGA - CORR MATRIX FOR RANDOM EFFECTS - ETAS  *******
         ETA1      ETA2      ETA3
 ETA1
+        3.51E-01
 ETA2
+        5.82E-01  3.53E-01
 ETA3
+        0.00E+00  0.00E+00  3.52E-01

 SIGMA - CORR MATRIX FOR RANDOM EFFECTS - EPSILONS  ***
         EPS1      EPS2
 EPS1
+        1.93E-01
 EPS2
+        0.00E+00  7.68E-02
 Elapsed finaloutput time in seconds:     0.01
 #CPUT: Total CPU Time in Seconds,        0.438
