Mon Jun  1 18:25:33 UTC 2026
$PROBLEM Base one-compartment oral absorption model created from pharos see run103_metadata.json for details.

$INPUT ID TIME EVID AMT CMT DV MDV WT SEX

$DATA /data/user-homes/matthews/Packages/hyperion/inst/extdata/data/derived/onecmpt-oral-30ind.csv IGNORE=@

$SUBROUTINES ADVAN4 TRANS4

$PK
; Typical values
TVCL = THETA(1)
TVV2  = THETA(2)
TVKA = THETA(3)
TVV3 = THETA(4)
TVQ = THETA(5)

; Individual parameters
CL = TVCL * EXP(ETA(1))
V2  = TVV2  * EXP(ETA(2))
KA = TVKA * EXP(ETA(3))
V3 = TVV3
Q = TVQ

; NONMEM scaling
S2 = V2

$ERROR
; Proportional + additive error model (matches mrgsolve)
IPRED = F
Y = IPRED * (1 + EPS(1)) + EPS(2)

$THETA
(0, 1.219137)     ;TVCL (L/hr)
(0, 38.17552)    ;TVV (L)
(0, 1.330243)     ;TVKA (1/hr)
(0, 10)           ;TVV2 (L)
(0, 1.2)          ;TVQ (L/hr)

$OMEGA BLOCK(2)
0.122       ;OM1 TVCL :EXP
0.074543    ;OM1,2 TVCL,TVV :EXP
0.124       ;OM2 TVV :EXP
$OMEGA
0.122       ;OM3 TVKA :EXP

$SIGMA
0.0375371    ;SIG1 Proportional error (variance, 20% CV)
0.00527      ;SIG2 Additive error (variance, 0.01 mg/L SD)

$ESTIMATION METHOD=1 INTERACTION MAXEVAL=9999 PRINT=5 MSFO=run103.msf
$COV PRINT=E MATRIX = R

$TABLE ID TIME DV PRED IPRED CWRES NPDE NOAPPEND NOPRINT ONEHEADER FILE=run103.tab
$TABLE ID CL V2 KA V3 Q ETAS(1:LAST) NOAPPEND NOPRINT ONEHEADER FIRSTONLY FILE=run103par.tab

NM-TRAN MESSAGES
 WARNINGS AND ERRORS (IF ANY) FOR PROBLEM    1
 (WARNING  2) NM-TRAN INFERS THAT THE DATA ARE POPULATION.
 LIM VALUES MAXLIM ASSESSED BY NMTRAN: 1,2,3,4,5,6,7,8,10,11,13,15,16
Note: Analytical 2nd Derivatives are constructed in FSUBS but are never used.
      You may insert $ABBR DERIV2=NO after the first $PROB to save FSUBS construction and compilation time

1NONLINEAR MIXED EFFECTS MODEL PROGRAM (NONMEM) VERSION 7.6.0 (nm760)
 ORIGINALLY DEVELOPED BY STUART BEAL, LEWIS SHEINER, AND ALISON BOECKMANN
 CURRENT DEVELOPERS ARE ROBERT BAUER, ICON DEVELOPMENT SOLUTIONS,
 AND ALISON BOECKMANN. IMPLEMENTATION, EFFICIENCY, AND STANDARDIZATION
 PERFORMED BY NOUS INFOSYSTEMS.
 PROBLEM NO.:         1
 Base one-compartment oral absorption model created from pharos see run10
 TOT. NO. OF OBS RECS:      210
 TOT. NO. OF INDIVIDUALS:       30
 TWO COMPARTMENT MODEL WITH FIRST-ORDER ABSORPTION (ADVAN4)
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 #TBLN:      1
 #METH: First Order Conditional Estimation with Interaction
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
0PRED EXIT CODE = 1
0INDIVIDUAL NO.       1   ID= 1.00000000000000E+00   (WITHIN-INDIVIDUAL) DATA REC NO.   2
 THETA=
  1.21E+00   4.01E+01   1.21E+00   7.68E+16   1.06E-01
 OCCURS DURING SEARCH FOR ETA AT INITIAL VALUE, ETA=0
 A ROOT OF THE CHARACTERISTIC EQUATION IS ZERO BECAUSE
 K*K32 IS MUCH SMALLER THAN  (K+K23+K32)**2.
 PERHAPS K OR K32 IS VERY SMALL, OR K23 IS VERY LARGE.
0PROGRAM TERMINATED BY OBJ
 MESSAGE ISSUED FROM ESTIMATION STEP

 #TERM:

 TOTAL DATA POINTS NORMALLY DISTRIBUTED (N):            0
 N*LOG(2PI) CONSTANT TO OBJECTIVE FUNCTION:    0.0000000000000000
 OBJECTIVE FUNCTION VALUE WITHOUT CONSTANT:   -109.84215729248636
 OBJECTIVE FUNCTION VALUE WITH CONSTANT:      -109.84215729248636
 REPORTED OBJECTIVE FUNCTION DOES NOT CONTAIN CONSTANT

 TOTAL EFFECTIVE ETAS (NIND*NETA):                             0


 #TERE:
 Elapsed estimation  time in seconds:     0.88
 #CPUT: Total CPU Time in Seconds,        0.894
